OpenVSP model (file version 5), 36 components.
Geometry view with OpenVSP parameter names; values to 6 digits, angles in degrees, lengths in the model's unit.
Overall bounding box: X_Min=0 X_Len=111.744 Y_Min=-62 Y_Len=144.445 Z_Min=-119.946 Z_Len=176.141

Wing "Wing"
  location (X Y Z) 15 2 5.86957, rotation 0 0 0
  symmetric about XZ
  bounding box size 22.0144 124 2.37106
  mass: Density=1 Shell_Flag=1 Mass_Area=0.02 Mass_Prior=0
  totals: TotalSpan=120 TotalProjectedSpan=120 TotalChord=22 TotalArea=2640 TotalAR=5.45455
  root: chord 22, twist 0, NACA 4-series Camber=0.0419457 CamberLoc=0.237557 ThickChord=0.104072
  sections:
    n  Span  Root_Chord  Tip_Chord  Area  Sweep  Sweep_Location  Dihedral  Twist  Twist_Location  tip airfoil
    1  60    22          22         1320  0      0               0         0      0.25            as above

Blank "PointMass", child of "Wing"
  location (X Y Z) 21.2619 0 6.58385, rotation 0 0 0; relative location 6.2619 -2 0.714286, rotation 0 0 0
  Mass: Point_Mass=230 Point_Mass_Flag=1

Fuselage "Strut", child of "Wing"
  location (X Y Z) 20.8043 29.2826 5.76087, rotation 23.5826 0 -90; relative location 5.80435 27.2826 -0.108696, rotation 23.5826 0 -90
  symmetric about XZ
  bounding box size 0.3 58.6852 11.937
  Design: Length=29.1
  cross sections:
    n  XLocPercent  YLocPercent  ZLocPercent  shape
    0  0            0            0            point
    1  0            0            0            ellipse Ellipse_Height=0.3 Ellipse_Width=0.3
    2  1            0            0            as above
    3  1            0            0            point

Fuselage "Strut", child of "Strut"
  location (X Y Z) 20.8043 14.2826 5.76087, rotation 0 90 0; relative location 0 -15 0, rotation 0 90 0
  symmetric about XZ
  bounding box size 0.3 28.8652 5.01405
  Design: Length=4.96405
  cross sections:
    n  XLocPercent  YLocPercent  ZLocPercent  shape
    0  0            0            0            point
    1  0            0            0            ellipse Ellipse_Height=0.3 Ellipse_Width=0.3
    2  1            0            0            as above
    3  1            0            0            point

Fuselage "Fuselage"
  location (X Y Z) 3 0 0, rotation 0 0 0
  bounding box size 70 8 12
  mass: Density=1 Shell_Flag=1 Mass_Area=0.04 Mass_Prior=0
  Design: Length=70
  cross sections:
    n  XLocPercent  YLocPercent  ZLocPercent  shape
    0  0            0            0            rounded rectangle RoundRectXSec_Radius=0.2 RoundedRect_Height=5 RoundedRect_Width=4
    1  0.114286     0            -0.0171429   rounded rectangle RoundRectXSec_Radius=0.2 RoundedRect_Height=8.2 RoundedRect_Width=7.5
    2  0.154286     0            0.00263781   rounded rectangle RoundRectXSec_Radius=0.2 RoundedRect_Height=11.6 RoundedRect_Width=7.5
    3  0.2          0            0            rounded rectangle RoundRectXSec_Radius=0.2 RoundedRect_Height=12 RoundedRect_Width=8
    4  0.314286     0            0            as above
    5  1            0            0.0571429    rounded rectangle RoundRectXSec_Radius=0 RoundedRect_Height=4 RoundedRect_Width=0.4
  SS_Rectangle "SS_RECT_0": Center_U=0.292683 Center_W=0.75 U_Length=0.219512 W_Length=0.25

Blank "MassMAIN", child of "Fuselage"
  location (X Y Z) 20.5 0 0, rotation 0 0 0; relative location 17.5 0 0, rotation 0 0 0
  Mass: Point_Mass=22.4 Point_Mass_Flag=1

Blank "MassTAIL", child of "Fuselage"
  location (X Y Z) 47.1038 0 0, rotation 0 0 0; relative location 44.1038 0 0, rotation 0 0 0
  Mass: Point_Mass=8 Point_Mass_Flag=1

Human "HumanForScale"
  location (X Y Z) 84.2932 52.1273 -20.583, rotation 0 0 41.1328
  mass: Density=0.00102385 Shell_Flag=0 Mass_Area=1 Mass_Prior=0
  Anthropometric: Age=20 AutoDensity=1 BMI=20.7 BMI_pct=0.05 GenderFlag=0 LenUnit=1 Mass=64.8046 MassUnit=1 SitFrac=0.535294 Stature=176.937 Stature_pct=0.568824 Volume=63294.9

Fuselage "Motor"
  location (X Y Z) 2.3913 0 0, rotation 0 0 0
  bounding box size 3 2.5 2.5
  Design: Length=3
  cross sections:
    n  XLocPercent  YLocPercent  ZLocPercent  shape
    0  0            0            0            point
    1  0            0            0            circle Circle_Diameter=2.5
    2  1            0            0            as above
    3  1            0            0            point

Fuselage "Axle", child of "Motor"
  location (X Y Z) 0.891304 0 0, rotation 0 0 0; relative location -1.5 0 0, rotation 0 0 0
  bounding box size 1.5 0.3 0.3
  Design: Length=1.5
  cross sections:
    n  XLocPercent  YLocPercent  ZLocPercent  shape
    0  0            0            0            point
    1  0            0            0            circle Circle_Diameter=0.3
    2  1            0            0            as above
    3  1            0            0            point

Propeller "PropGeom", child of "Axle"
  location (X Y Z) 1.56522 0 0, rotation 0 0 0; relative location 0.673913 0 0, rotation 0 0 0
  bounding box size 0.847513 27.0486 2.7013
  Design: Diameter=27 NumBlade=2 Beta34=0 UseBeta34Flag=1 Feather=-20 Rotate=0 Precone=0 ReverseFlag=0 FoldAngle=0 PropMode=0 AF=149.299 CLi=0.524046 Chord=0.177936 Solidity=0.113278 ConstructXoC=0.5 FeatherAxisXoC=0.5 FeatherOffsetXoC=0
  cross sections:
    n  RadiusFrac  shape
    0  0.0555556   ellipse Ellipse_Height=0.61875 Ellipse_Width=1.2375
    1  0.4         NACA 16-series Chord=2.49496 IdealCl=0.7 ThickChord=0.200022
    2  1           NACA 16-series Chord=1.755 IdealCl=0.2 ThickChord=0.03
  Chord along r/R (cubic Bezier): 0.0555556: 0.0916667, 0.237037: 0.161667, 0.418519: 0.2, 0.6: 0.2, 0.716667: 0.2, 0.833333: 0.2, 0.95: 0.2, 0.966667: 0.2, 0.983333: 0.2, 1: 0.13
  Twist along r/R (PCHIP): 0.0555556: 46.75, 0.75: 20, 1: 13
  Thick along r/R (cubic Bezier): 0.0555556: 0.5, 0.170404: 0.3, 0.285252: 0.225, 0.4001: 0.2, 0.466733: 0.125, 0.533367: 0.115, 0.6: 0.1, 0.733333: 0.075, 0.866667: 0.055, 1: 0.03
  CLI along r/R (cubic Bezier): 0.0555556: 0, 0.170404: 0.7, 0.285252: 0.7, 0.4001: 0.7, 0.466733: 0.7, 0.533367: 0.7, 0.6: 0.7, 0.733333: 0.7, 0.866667: 0.7, 1: 0.2

Fuselage "PropRing", child of "PropGeom"
  location (X Y Z) 1.31522 0 0, rotation 0 0 0; relative location -0.25 0 0, rotation 0 0 0
  bounding box size 0.5 1.5 1.5
  Design: Length=0.5
  cross sections:
    n  XLocPercent  YLocPercent  ZLocPercent  shape
    0  0            0            0            point
    1  0            0            0            circle Circle_Diameter=1.5
    2  1            0            0            as above
    3  1            0            0            point

Blank "PointMass", child of "PropGeom"
  location (X Y Z) 1.56522 0 0, rotation 0 0 0; relative location 0 0 0, rotation 0 0 0
  Mass: Point_Mass=10 Point_Mass_Flag=1

Blank "PointMass", child of "Motor"
  location (X Y Z) 3.8913 0 0, rotation 0 0 0; relative location 1.5 0 0, rotation 0 0 0
  Mass: Point_Mass=72 Point_Mass_Flag=1

Blank "Battery"
  location (X Y Z) 9.28571 0 -3.33333, rotation 0 0 0

Custom "Box", child of "Battery"
  location (X Y Z) 9.28571 0 -3.33333, rotation 0 0 0; relative location 0 0 0, rotation 0 0 0
  bounding box size 10 3 1
  Design: Height=1 Length=10 SquareFlag=0 Width=3
  custom script Box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

Custom "Box", child of "Battery"
  location (X Y Z) 9.28571 0 -2.83333, rotation 0 0 0; relative location 0 0 0.5, rotation 0 0 0
  bounding box size 10 3 1
  Design: Height=1 Length=10 SquareFlag=0 Width=3
  custom script Box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

Blank "Mass", child of "Battery"
  location (X Y Z) 14.2857 0 -3.08333, rotation 0 0 0; relative location 5 0 0.25, rotation 0 0 0
  Mass: Point_Mass=100 Point_Mass_Flag=1

Blank "Reciever"
  location (X Y Z) 22.8571 0 -2.85714, rotation 0 0 0
  Mass: Point_Mass=20 Point_Mass_Flag=1

Custom "Box", child of "Reciever"
  location (X Y Z) 20.3571 0 -2.85714, rotation 0 0 0; relative location -2.5 0 0, rotation 0 0 0
  bounding box size 5 3.5 1.5
  Design: Height=1.5 Length=5 SquareFlag=0 Width=3.5
  custom script Box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

Wing "VertStab"
  location (X Y Z) 73 0 6, rotation -90 0 -180
  bounding box size 8 0.6 12
  mass: Density=0.033 Shell_Flag=0 Mass_Area=1 Mass_Prior=0
  totals: TotalSpan=12 TotalProjectedSpan=12 TotalChord=6 TotalArea=72 TotalAR=2
  root: chord 8, twist 0, rounded rectangle RoundRectXSec_Radius=0.0075 RoundedRect_Height=0.6 RoundedRect_Width=8
  sections:
    n  Span  Root_Chord  Tip_Chord  Area  Sweep  Sweep_Location  Dihedral  Twist  Twist_Location  tip airfoil
    1  12    8           4          72    0      0               0         0      0.25            rounded rectangle RoundRectXSec_Radius=7.5e-06 RoundedRect_Height=0.6 RoundedRect_Width=4

Blank "Mass", child of "VertStab"
  location (X Y Z) 66.7736 0 15.3396, rotation -90 0 -180; relative location 6.22642 9.33962 0, rotation 0 0 0
  Mass: Point_Mass=25.6 Point_Mass_Flag=1

Blank "HingeY", child of "VertStab"
  location (X Y Z) 73 0 6, rotation -90 10 -180; relative location 0 0 0, rotation 0 -10 0

Wing "RudderTip", child of "HingeY"
  location (X Y Z) 71.0304 0.347296 20, rotation -90 10 0; relative location 2 14 0, rotation 0 0 180
  bounding box size 6.01304 1.63277 2
  mass: Density=0.033 Shell_Flag=0 Mass_Area=1 Mass_Prior=0
  totals: TotalSpan=2 TotalProjectedSpan=2 TotalChord=4 TotalArea=8 TotalAR=0.5
  root: chord 2, twist 0, rounded rectangle RoundRectXSec_Radius=0 RoundedRect_Height=0.6 RoundedRect_Width=2
  sections:
    n  Span  Root_Chord  Tip_Chord  Area  Sweep  Sweep_Location  Dihedral  Twist  Twist_Location  tip airfoil
    1  2     2           6          8     -45    0               0         0      0.25            rounded rectangle RoundRectXSec_Radius=0 RoundedRect_Height=0.6 RoundedRect_Width=6

Wing "RudderMain", child of "HingeY"
  location (X Y Z) 73 0 4, rotation 90 -10 0; relative location 0 -2 0, rotation 0 180 0
  bounding box size 5.02823 1.45913 14
  mass: Density=0.033 Shell_Flag=0 Mass_Area=1 Mass_Prior=0
  totals: TotalSpan=14 TotalProjectedSpan=14 TotalChord=3.6675 TotalArea=47.2587 TotalAR=4.14738
  root: chord 0.005, twist 0, rounded rectangle RoundRectXSec_Radius=0 RoundedRect_Height=0.6 RoundedRect_Width=0.005
  sections:
    n  Span     Root_Chord  Tip_Chord  Area     Sweep  Sweep_Location  Dihedral  Twist  Twist_Location  tip airfoil
    1  3.5      0.005       5          8.75874  0      0               0         0      0.25            rounded rectangle RoundRectXSec_Radius=0 RoundedRect_Height=0.6 RoundedRect_Width=5
    2  1.16667  5           5          5.83333  0      0               0         0      0.25            as above
    3  9.33333  5           2          32.6667  0      0               0         0      0.25            rounded rectangle RoundRectXSec_Radius=0 RoundedRect_Height=0.6 RoundedRect_Width=2

Wing "VertStab", child of "VertStab"
  location (X Y Z) 66.1522 0 6, rotation -90 0 -180
  bounding box size 15 0.4 3
  mass: Density=0.033 Shell_Flag=0 Mass_Area=1 Mass_Prior=0
  totals: TotalSpan=3 TotalProjectedSpan=3 TotalChord=7.5 TotalArea=22.5 TotalAR=0.4
  root: chord 15, twist 0, rounded rectangle RoundRectXSec_Radius=0.0075 RoundedRect_Height=0.4 RoundedRect_Width=15
  sections:
    n  Span  Root_Chord  Tip_Chord  Area  Sweep  Sweep_Location  Dihedral  Twist  Twist_Location  tip airfoil
    1  3     15          0          22.5  0      0               0         0      0.25            rounded rectangle RoundRectXSec_Radius=0 RoundedRect_Height=0.4 RoundedRect_Width=0

Wing "HorizStab"
  location (X Y Z) 66 0 5, rotation 0 0 0
  symmetric about XZ
  bounding box size 8 30 0.6
  mass: Density=0.033 Shell_Flag=0 Mass_Area=1 Mass_Prior=0
  totals: TotalSpan=30 TotalProjectedSpan=30 TotalChord=6.5 TotalArea=195 TotalAR=4.61538
  root: chord 8, twist 0, rounded rectangle RoundRectXSec_Radius=0.0075 RoundedRect_Height=0.6 RoundedRect_Width=8
  sections:
    n  Span  Root_Chord  Tip_Chord  Area  Sweep    Sweep_Location  Dihedral  Twist  Twist_Location  tip airfoil
    1  15    8           5          97.5  11.2727  0               0         0      0.25            rounded rectangle RoundRectXSec_Radius=0.0075 RoundedRect_Height=0.6 RoundedRect_Width=5

Blank "Mass", child of "HorizStab"
  location (X Y Z) 73.9245 0 5, rotation 0 0 0; relative location 7.92453 0 0, rotation 0 0 0
  Mass: Point_Mass=15 Point_Mass_Flag=1

Blank "HingeY", child of "HorizStab"
  location (X Y Z) 74 0 5, rotation 0 0 0; relative location 8 0 0, rotation 0 0 0

Wing "Elevator", child of "HingeY"
  location (X Y Z) 74 0 5, rotation -180 0 -180; relative location 0 0 0, rotation 0 180 0
  symmetric about XZ
  bounding box size 6.00429 30 0.6
  mass: Density=0.033 Shell_Flag=0 Mass_Area=1 Mass_Prior=0
  totals: TotalSpan=30 TotalProjectedSpan=30 TotalChord=3.7985 TotalArea=131.522 TotalAR=6.84296
  root: chord 0.00599401, twist 0, rounded rectangle RoundRectXSec_Radius=0 RoundedRect_Height=0.6 RoundedRect_Width=0.00599401
  sections:
    n  Span  Root_Chord  Tip_Chord  Area    Sweep     Sweep_Location  Dihedral  Twist  Twist_Location  tip airfoil
    1  2     0.00599401  5.99401    6       -71.5602  0               0         0      0.25            rounded rectangle RoundRectXSec_Radius=0.0075 RoundedRect_Height=0.6 RoundedRect_Width=5.99401
    2  13    5.99401     3.2        59.761  12.1061   0               0         0      0.25            rounded rectangle RoundRectXSec_Radius=0.0075 RoundedRect_Height=0.6 RoundedRect_Width=3.2

Wing "RudderTip", child of "Elevator"
  location (X Y Z) 70.7 17 5, rotation -180 0 0; relative location 3.3 17 0, rotation 0 0 180
  symmetric about XZ
  bounding box size 8.2 34 0.6
  mass: Density=0.033 Shell_Flag=0 Mass_Area=1 Mass_Prior=0
  totals: TotalSpan=4 TotalProjectedSpan=4 TotalChord=5.6 TotalArea=22.4 TotalAR=0.714286
  root: chord 3, twist 0, rounded rectangle RoundRectXSec_Radius=0 RoundedRect_Height=0.6 RoundedRect_Width=3
  sections:
    n  Span  Root_Chord  Tip_Chord  Area  Sweep  Sweep_Location  Dihedral  Twist  Twist_Location  tip airfoil
    1  2     3           8.2        11.2  -40    0               0         0      0.25            rounded rectangle RoundRectXSec_Radius=0 RoundedRect_Height=0.6 RoundedRect_Width=8.2

Mesh "MeshGeom"
  location (X Y Z) 0 0 0, rotation 0 0 0

Mesh "MeshGeom"
  location (X Y Z) 0 0 0, rotation 0 0 0

Fuselage "Wheel"
  location (X Y Z) 17 9 -11, rotation 0 0 90
  symmetric about XZ
  bounding box size 5 22 5
  Design: Length=2
  cross sections:
    n  XLocPercent  YLocPercent  ZLocPercent  shape
    0  0            0            0            ellipse Ellipse_Height=5 Ellipse_Width=5
    1  1            0            0            as above

Fuselage "Strut", child of "Wheel"
  location (X Y Z) 17 7.15217 -9.15217, rotation 0 0 -90; relative location 0 -1.84783 1.84783, rotation 0 0 -90
  symmetric about XZ
  bounding box size 0.3 14.3043 0.3
  Design: Length=9.95868
  cross sections:
    n  XLocPercent  YLocPercent  ZLocPercent  shape
    0  0            0            0            point
    1  0            0            0            ellipse Ellipse_Height=0.3 Ellipse_Width=0.3
    2  1            0            0            as above
    3  1            0            0            point

Fuselage "Strut", child of "Wheel"
  location (X Y Z) 17 9 -11, rotation -44.6603 0 -90; relative location 0 0 0, rotation -44.6603 0 -90
  symmetric about XZ
  bounding box size 0.3 18.2109 5.53947
  Design: Length=7.52727
  cross sections:
    n  XLocPercent  YLocPercent  ZLocPercent  shape
    0  0            0            0            point
    1  0            0            0            ellipse Ellipse_Height=0.3 Ellipse_Width=0.3
    2  1            0            0            as above
    3  1            0            0            point
