OpenVSP model (file version 5), 40 components.
Geometry view with OpenVSP parameter names; values to 6 digits, angles in degrees, lengths in the model's unit.
Overall bounding box: X_Min=-233.973 X_Len=500 Y_Min=-250 Y_Len=500 Z_Min=-43.7649 Z_Len=205.891

Blank "Plane"
  location (X Y Z) 0 0 2.38095, rotation 0 13.5714 0

Wing "Wing", child of "Plane"
  location (X Y Z) 12.4795 2 3.79193, rotation 0 13.5714 0; relative location 11.8 2 4.3, rotation 0 0 0
  symmetric about XZ
  bounding box size 15.5543 82.4371 4.49489
  mass: Density=1 Shell_Flag=1 Mass_Area=0.02 Mass_Prior=0
  totals: TotalSpan=70 TotalProjectedSpan=70 TotalChord=16 TotalArea=1120 TotalAR=4.375
  root: chord 16, twist 0, NACA 4-series Camber=0.0419457 CamberLoc=0.237557 ThickChord=0.104072
  sections:
    n  Span  Root_Chord  Tip_Chord  Area  Sweep  Sweep_Location  Dihedral  Twist  Twist_Location  tip airfoil
    1  35    16          16         560   0      0               0         0      0.25            as above

Blank "ServoMass", child of "Wing"
  location (X Y Z) 20.4795 27 4.29193, rotation 0 0 0; relative location 8 25 0.5, rotation 0 0 0
  Mass: Point_Mass=6.5 Point_Mass_Flag=1

Blank "ServoMass", child of "Wing"
  location (X Y Z) 20.4795 -23 4.29193, rotation 0 0 0; relative location 8 -25 0.5, rotation 0 0 0
  Mass: Point_Mass=6.5 Point_Mass_Flag=1

Blank "PointMass", child of "Wing"
  location (X Y Z) 17.4795 0 4.50622, rotation 0 0 0; relative location 5 -2 0.714286, rotation 0 0 0
  Mass: Point_Mass=81.6 Point_Mass_Flag=1

Fuselage "Strut", child of "Wing"
  location (X Y Z) 14.5926 33.1957 3.17002, rotation 24.1833 12.419 -95.5163; relative location 2.2 31.1957 -0.108696, rotation 23.5826 0 -90
  symmetric about XZ
  bounding box size 3.04602 66.5113 11.6231
  Design: Length=29.1
  cross sections:
    n  XLocPercent  YLocPercent  ZLocPercent  shape
    0  0            0            0            point
    1  0            0            0            ellipse Ellipse_Height=0.3 Ellipse_Width=0.3
    2  1            0            0            as above
    3  1            0            0            point

Fuselage "Strut", child of "Strut"
  location (X Y Z) 14.5926 18.1957 3.17002, rotation 180 76.4286 -180; relative location 13.7473 0 6.00106, rotation -90 0 66.4174
  symmetric about XZ
  bounding box size 1.84212 36.6913 6.4934
  Design: Length=6.55749
  cross sections:
    n  XLocPercent  YLocPercent  ZLocPercent  shape
    0  0            0            0            point
    1  0            0            0            ellipse Ellipse_Height=0.3 Ellipse_Width=0.3
    2  1            0            0            as above
    3  1            0            0            point

Fuselage "Fuselage", child of "Plane"
  location (X Y Z) 2.91623 0 1.67698, rotation 0 13.5714 0; relative location 3 0 0, rotation 0 0 0
  bounding box size 44.7995 8 14.0435
  mass: Density=1 Shell_Flag=1 Mass_Area=0.04 Mass_Prior=0
  Design: Length=45
  cross sections:
    n  XLocPercent  YLocPercent  ZLocPercent  shape
    0  0            0            -0.0333333   rounded rectangle RoundRectXSec_Radius=0.2 RoundedRect_Height=4 RoundedRect_Width=5
    1  0.144444     0            -0.040708    rounded rectangle RoundRectXSec_Radius=0.2 RoundedRect_Height=6 RoundedRect_Width=7.5
    2  0.233333     0            0.00263781   rounded rectangle RoundRectXSec_Radius=0.2 RoundedRect_Height=10 RoundedRect_Width=8
    3  0.444444     0            0            as above
    4  1            0            0            rounded rectangle RoundRectXSec_Radius=0 RoundedRect_Height=2 RoundedRect_Width=0.4

Blank "MassMAIN", child of "Fuselage"
  location (X Y Z) 20.4136 0 -2.54685, rotation 0 13.5714 0; relative location 18 0 0, rotation 0 0 0
  Mass: Point_Mass=45.38 Point_Mass_Flag=1

Fuselage "Motor", child of "Plane"
  location (X Y Z) 1.97255 0 0.361698, rotation 0 13.5714 0; relative location 2.3913 0 -1.5, rotation 0 0 0
  bounding box size 3.50288 2.5 3.13417
  Design: Length=3
  cross sections:
    n  XLocPercent  YLocPercent  ZLocPercent  shape
    0  0            0            0            point
    1  0            0            0            circle Circle_Diameter=2.5
    2  1            0            0            as above
    3  1            0            0            point

Fuselage "Axle", child of "Motor"
  location (X Y Z) 0.514431 0 0.713684, rotation 0 13.5714 0; relative location -1.5 0 0, rotation 0 0 0
  bounding box size 1.52851 0.3 0.64361
  Design: Length=1.5
  cross sections:
    n  XLocPercent  YLocPercent  ZLocPercent  shape
    0  0            0            0            point
    1  0            0            0            circle Circle_Diameter=0.3
    2  1            0            0            as above
    3  1            0            0            point

Propeller "PropGeom", child of "Axle"
  location (X Y Z) 1.16953 0 0.555545, rotation 0 13.5714 0; relative location 0.673913 0 0, rotation 0 0 0
  bounding box size 1.1708 27.0486 2.67739
  Design: Diameter=27 NumBlade=2 Beta34=0 UseBeta34Flag=1 Feather=-20 Rotate=0 Precone=0 ReverseFlag=0 FoldAngle=0 PropMode=0 AF=149.299 CLi=0.524046 Chord=0.177936 Solidity=0.113278 ConstructXoC=0.5 FeatherAxisXoC=0.5 FeatherOffsetXoC=0
  cross sections:
    n  RadiusFrac  shape
    0  0.0555556   ellipse Ellipse_Height=0.61875 Ellipse_Width=1.2375
    1  0.4         NACA 16-series Chord=2.49496 IdealCl=0.7 ThickChord=0.200022
    2  1           NACA 16-series Chord=1.755 IdealCl=0.2 ThickChord=0.03
  Chord along r/R (cubic Bezier): 0.0555556: 0.0916667, 0.237037: 0.161667, 0.418519: 0.2, 0.6: 0.2, 0.716667: 0.2, 0.833333: 0.2, 0.95: 0.2, 0.966667: 0.2, 0.983333: 0.2, 1: 0.13
  Twist along r/R (PCHIP): 0.0555556: 46.75, 0.75: 20, 1: 13
  Thick along r/R (cubic Bezier): 0.0555556: 0.5, 0.170404: 0.3, 0.285252: 0.225, 0.4001: 0.2, 0.466733: 0.125, 0.533367: 0.115, 0.6: 0.1, 0.733333: 0.075, 0.866667: 0.055, 1: 0.03
  CLI along r/R (cubic Bezier): 0.0555556: 0, 0.170404: 0.7, 0.285252: 0.7, 0.4001: 0.7, 0.466733: 0.7, 0.533367: 0.7, 0.6: 0.7, 0.733333: 0.7, 0.866667: 0.7, 1: 0.2

Fuselage "PropRing", child of "PropGeom"
  location (X Y Z) 0.926508 0 0.61421, rotation 0 13.5714 0; relative location -0.25 0 0, rotation 0 0 0
  bounding box size 0.838025 1.5 1.57545
  Design: Length=0.5
  cross sections:
    n  XLocPercent  YLocPercent  ZLocPercent  shape
    0  0            0            0            point
    1  0            0            0            circle Circle_Diameter=1.5
    2  1            0            0            as above
    3  1            0            0            point

Blank "PointMass", child of "PropGeom"
  location (X Y Z) 1.16953 0 0.555545, rotation 0 0 0; relative location 0 0 0, rotation 0 0 0
  Mass: Point_Mass=10 Point_Mass_Flag=1

Blank "PointMass", child of "Motor"
  location (X Y Z) 3.47255 0 0.361698, rotation 0 0 0; relative location 1.5 0 0, rotation 0 0 0
  Mass: Point_Mass=26 Point_Mass_Flag=1

Blank "Battery", child of "Plane"
  location (X Y Z) 7.44136 0 -3.01591, rotation 0 13.5714 0; relative location 8.5 0 -3.5, rotation 0 0 0

Custom "Box", child of "Battery"
  location (X Y Z) 7.44136 0 -3.01591, rotation 0 0 0; relative location 0 0 0, rotation 0 0 0
  bounding box size 5 3 2
  Design: Height=2 Length=5 SquareFlag=0 Width=3
  custom script Box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

Blank "Mass", child of "Battery"
  location (X Y Z) 9.93022 0 -3.35953, rotation 0 13.5714 0; relative location 2.5 0 0.25, rotation 0 0 0
  Mass: Point_Mass=31 Point_Mass_Flag=1

Blank "Reciever", child of "Plane"
  location (X Y Z) 10.1062 0 -2.63047, rotation 0 13.5714 0; relative location 11 0 -2.5, rotation 0 0 0
  Mass: Point_Mass=20 Point_Mass_Flag=1

Custom "Box", child of "Reciever"
  location (X Y Z) 8.02801 0 -0.585714, rotation 0 13.5714 0; relative location -2.5 0 1.5, rotation 0 0 0
  bounding box size 5.21238 3.5 2.6314
  Design: Height=1.5 Length=5 SquareFlag=0 Width=3.5
  custom script Box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

Wing "VertStab", child of "Plane"
  location (X Y Z) 46.8944 0 -7.91052, rotation -90 0 -166.429; relative location 48 0 1, rotation -90 0 -180
  bounding box size 8.68181 0.3 8.4806
  mass: Density=0.033 Shell_Flag=0 Mass_Area=1 Mass_Prior=0
  totals: TotalSpan=8 TotalProjectedSpan=8 TotalChord=5 TotalArea=40 TotalAR=1.6
  root: chord 7, twist 0, rounded rectangle RoundRectXSec_Radius=0.0075 RoundedRect_Height=0.3 RoundedRect_Width=7
  sections:
    n  Span  Root_Chord  Tip_Chord  Area  Sweep  Sweep_Location  Dihedral  Twist  Twist_Location  tip airfoil
    1  8     7           3          40    0      0               0         0      0.25            rounded rectangle RoundRectXSec_Radius=7.5e-06 RoundedRect_Height=0.3 RoundedRect_Width=3

Blank "Mass", child of "VertStab"
  location (X Y Z) 47.5984 0 -4.99429, rotation -90 0 -166.429; relative location 0 3 0, rotation 0 0 0
  Mass: Point_Mass=2.8 Point_Mass_Flag=1

Blank "Hinge", child of "VertStab"
  location (X Y Z) 47.1291 0 -6.93845, rotation -90 0 -166.429; relative location 0 1 0, rotation 0 0 0

Wing "RudderTip", child of "Hinge"
  location (X Y Z) 48.2689 0 2.04491, rotation -90 0 13.5714; relative location 1 9 0, rotation 0 0 180
  bounding box size 4.86039 0.3 2.64813
  mass: Density=0.033 Shell_Flag=0 Mass_Area=1 Mass_Prior=0
  totals: TotalSpan=2 TotalProjectedSpan=2 TotalChord=3 TotalArea=6 TotalAR=0.666667
  root: chord 1, twist 0, rounded rectangle RoundRectXSec_Radius=0 RoundedRect_Height=0.3 RoundedRect_Width=1
  sections:
    n  Span  Root_Chord  Tip_Chord  Area  Sweep  Sweep_Location  Dihedral  Twist  Twist_Location  tip airfoil
    1  2     1           5          6     -45    0               0         0      0.25            rounded rectangle RoundRectXSec_Radius=0 RoundedRect_Height=0.3 RoundedRect_Width=5

Wing "RudderMain", child of "Hinge"
  location (X Y Z) 46.4251 0 -9.85468, rotation 90 0 -13.5714; relative location 0 -3 0, rotation 0 180 0
  bounding box size 5.64258 0.6 9.72195
  mass: Density=0.033 Shell_Flag=0 Mass_Area=1 Mass_Prior=0
  totals: TotalSpan=10 TotalProjectedSpan=10 TotalChord=3.6675 TotalArea=33.7562 TotalAR=2.96242
  root: chord 0.005, twist 0, rounded rectangle RoundRectXSec_Radius=0 RoundedRect_Height=0.3 RoundedRect_Width=0.005
  sections:
    n  Span      Root_Chord  Tip_Chord  Area     Sweep  Sweep_Location  Dihedral  Twist  Twist_Location  tip airfoil
    1  2.5       0.005       5          6.25624  0      0               0         0      0.25            rounded rectangle RoundRectXSec_Radius=0 RoundedRect_Height=0.3 RoundedRect_Width=5
    2  0.833333  5           5          4.16666  0      0               0         0      0.25            rounded rectangle RoundRectXSec_Radius=0 RoundedRect_Height=0.6 RoundedRect_Width=5
    3  6.66667   5           2          23.3333  0      0               0         0      0.25            rounded rectangle RoundRectXSec_Radius=0 RoundedRect_Height=0.6 RoundedRect_Width=2

Wing "VertStab", child of "VertStab"
  location (X Y Z) 43.2408 0 -5.99982, rotation -90 0 -166.429; relative location 4 1 0, rotation 0 0 0
  bounding box size 15.2851 0.2 3.51986
  mass: Density=0.033 Shell_Flag=0 Mass_Area=1 Mass_Prior=0
  totals: TotalSpan=3 TotalProjectedSpan=3 TotalChord=7.5 TotalArea=22.5 TotalAR=0.4
  root: chord 15, twist 0, rounded rectangle RoundRectXSec_Radius=0.00666667 RoundedRect_Height=0.2 RoundedRect_Width=15
  sections:
    n  Span  Root_Chord  Tip_Chord  Area  Sweep  Sweep_Location  Dihedral  Twist  Twist_Location  tip airfoil
    1  3     15          0          22.5  0      0               0         0      0.25            rounded rectangle RoundRectXSec_Radius=0 RoundedRect_Height=0.2 RoundedRect_Width=0

Blank "ServoMass", child of "VertStab"
  location (X Y Z) 45.3589 -0.452381 -6.56012, rotation -90 0 -166.429; relative location 1.80952 0.952381 -0.452381, rotation 0 0 0
  Mass: Point_Mass=6.5 Point_Mass_Flag=1

Wing "HorizStab", child of "Plane"
  location (X Y Z) 38.8831 0 -7.00534, rotation 0 13.5714 0; relative location 40 0 0, rotation 0 0 0
  symmetric about XZ
  bounding box size 5.42532 18 1.58238
  mass: Density=0.033 Shell_Flag=0 Mass_Area=1 Mass_Prior=0
  totals: TotalSpan=18 TotalProjectedSpan=18 TotalChord=4.5 TotalArea=81 TotalAR=4
  root: chord 5.5, twist 0, rounded rectangle RoundRectXSec_Radius=0.0075 RoundedRect_Height=0.3 RoundedRect_Width=5.5
  sections:
    n  Span  Root_Chord  Tip_Chord  Area  Sweep  Sweep_Location  Dihedral  Twist  Twist_Location  tip airfoil
    1  9     5.5         3.5        40.5  12.6   0               0         0      0.25            rounded rectangle RoundRectXSec_Radius=0.0075 RoundedRect_Height=0.3 RoundedRect_Width=3.5

Blank "Mass", child of "HorizStab"
  location (X Y Z) 46.5864 0 -8.86489, rotation 0 13.5714 0; relative location 7.92453 0 0, rotation 0 0 0
  Mass: Point_Mass=6 Point_Mass_Flag=1

Blank "Hinge", child of "HorizStab"
  location (X Y Z) 44.2296 0 -8.29596, rotation 0 13.5714 0; relative location 5.5 0 0, rotation 0 0 0

Wing "Elevator", child of "Hinge"
  location (X Y Z) 44.2296 0 -8.29596, rotation -180 -13.5714 -180; relative location 0 0 0, rotation 0 180 0
  symmetric about XZ
  bounding box size 4.44248 18 1.34548
  mass: Density=0.033 Shell_Flag=0 Mass_Area=1 Mass_Prior=0
  totals: TotalSpan=18 TotalProjectedSpan=18 TotalChord=2.99888 TotalArea=61.4685 TotalAR=5.27099
  root: chord 0.0044955, twist 0, rounded rectangle RoundRectXSec_Radius=0 RoundedRect_Height=0.3 RoundedRect_Width=0.0044955
  sections:
    n  Span  Root_Chord  Tip_Chord  Area     Sweep  Sweep_Location  Dihedral  Twist  Twist_Location  tip airfoil
    1  2     0.0044955   4.4955     4.5      -66    0               0         0      0.25            rounded rectangle RoundRectXSec_Radius=0.0075 RoundedRect_Height=0.3 RoundedRect_Width=4.4955
    2  7     4.4955      3          26.2343  12.1   0               0         0      0.25            rounded rectangle RoundRectXSec_Radius=0.0075 RoundedRect_Height=0.3 RoundedRect_Width=3

Wing "ElevatorTip", child of "Elevator"
  location (X Y Z) 44.2296 12 -8.29596, rotation -180 -13.5714 0; relative location 0 12 0, rotation 0 0 180
  symmetric about XZ
  bounding box size 6.38259 24 1.81537
  mass: Density=0.033 Shell_Flag=0 Mass_Area=1 Mass_Prior=0
  totals: TotalSpan=6 TotalProjectedSpan=6 TotalChord=3.25 TotalArea=19.5 TotalAR=1.84615
  root: chord 0.00649351, twist 0, rounded rectangle RoundRectXSec_Radius=0 RoundedRect_Height=0.3 RoundedRect_Width=0.00649351
  sections:
    n  Span  Root_Chord  Tip_Chord  Area  Sweep     Sweep_Location  Dihedral  Twist  Twist_Location  tip airfoil
    1  3     0.00649351  6.49351    9.75  -39.5455  0.159091        0         0      0.25            rounded rectangle RoundRectXSec_Radius=0 RoundedRect_Height=0.3 RoundedRect_Width=6.49351

Blank "ServoMass", child of "HorizStab"
  location (X Y Z) 41.8831 -2 -8.00534, rotation 0 0 0; relative location 3 -2 -1, rotation 0 0 0
  Mass: Point_Mass=6.5 Point_Mass_Flag=1

Fuselage "Wheel", child of "Plane"
  location (X Y Z) 11.3594 8.67391 -10.2235, rotation 0 13.5714 90; relative location 14 8.67391 -9.58696, rotation 0 0 90
  symmetric about XZ
  bounding box size 7.25784 21.3478 7.25784
  Design: Length=2
  cross sections:
    n  XLocPercent  YLocPercent  ZLocPercent  shape
    0  0            0            0            ellipse Ellipse_Height=7 Ellipse_Width=7
    1  1            0            0            as above

Fuselage "Strut", child of "Wheel"
  location (X Y Z) 11.793 6.82609 -8.42729, rotation 0 13.5714 -90; relative location -1.84783 0 1.84783, rotation 0 0 -180
  symmetric about XZ
  bounding box size 0.31105 13.6522 0.31105
  Design: Length=9.95868
  cross sections:
    n  XLocPercent  YLocPercent  ZLocPercent  shape
    0  0            0            0            point
    1  0            0            0            ellipse Ellipse_Height=0.3 Ellipse_Width=0.3
    2  1            0            0            as above
    3  1            0            0            point

Fuselage "Strut", child of "Wheel"
  location (X Y Z) 11.3594 8.67391 -10.2235, rotation -45.4716 9.60813 -80.3698; relative location 0 0 0, rotation 0 44.6603 -180
  symmetric about XZ
  bounding box size 1.55525 17.5587 5.40422
  Design: Length=7.52727
  cross sections:
    n  XLocPercent  YLocPercent  ZLocPercent  shape
    0  0            0            0            point
    1  0            0            0            ellipse Ellipse_Height=0.3 Ellipse_Width=0.3
    2  1            0            0            as above
    3  1            0            0            point

Blank "WheelMass", child of "Wheel"
  location (X Y Z) 11.3594 0.173913 -10.2235, rotation 0 13.5714 90; relative location -8.5 0 0, rotation 0 0 0
  Mass: Point_Mass=10 Point_Mass_Flag=1

Fuselage "Wheel", child of "Plane"
  location (X Y Z) 47.349 0 -12.6048, rotation 0 13.5714 90; relative location 49.5435 0 -3.45652, rotation 0 0 90
  bounding box size 2.07367 1 2.07367
  Design: Length=1
  cross sections:
    n  XLocPercent  YLocPercent  ZLocPercent  shape
    0  0            0            0            ellipse Ellipse_Height=2 Ellipse_Width=2
    1  1            0            0            as above

Custom "Grid 10x10"
  location (X Y Z) -233.973 0 -28.7649, rotation 0 0 0
  bounding box size 500 500 30
  Design: Height=30 Length=500 SquareFlag=0 Width=500
  custom script Box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

Human "HumanGeom"
  location (X Y Z) 61.7817 49.4403 89.3552, rotation 0 0 0
  mass: Density=0.00104752 Shell_Flag=0 Mass_Area=1 Mass_Prior=0
  Anthropometric: Age=22.4706 AutoDensity=1 BMI=21.2225 BMI_pct=0.0649683 GenderFlag=0 LenUnit=1 Mass=65.4402 MassUnit=1 SitFrac=0.505882 Stature=175.6 Stature_pct=0.5 Volume=62471.5
